t := 0.10572
n := 44
lymda := 221
m(t) := 1/t
var_t := 0.1, 0.11 .. 0.2
P0(t) := 1/(sum(1/k!*(lymda/m(t))^k, k = 1 .. n) + m(t)/((n - 1)!*(n*m(t) - lymda))*(lymda/m(t))^n)
P0(t) = 7.12969e-11
Pw(t) := m(t)*P0(t)/((n - 1)!*(n*m(t) - lymda))*(lymda/m(t))^n
Pw(t) = 9.40753e-5
# [plot: Pw(var_t) vs var_t]
