t := 0.25
n := 63
lymda := 150
m := 1/t
var_n := 1, 2 .. 200
k := 36
P0(n) := 1/(sum(1/k!*(lymda/m)^k, k = 1 .. n) + m/((n - 1)!*(n*m - lymda))*(lymda/m)^n)
P0(n) = 5.17533e-17
P(k) := if(k ≤ n, 1/k!*(lymda/m)^k*P0(k), 1/(n!*n^(k - n))*(lymda/m)^k*P0(k))
P(k) = -0.0585677
# [plot: P0(var_n) vs var_n]
