t := 0.12
n := 44
lymda := 221
m(t) := 1/t
var_t := 0.1, 0.11 .. 0.25
P0(t) := 1/(sum(1/k!*(lymda/m(t))^k, k = 1 .. n) + m(t)/((n - 1)!*(n*m(t) - lymda))*(lymda/m(t))^n)
P0(t) = 3.0357e-12
Pw(t) := m(t)*P0(t)/((n - 1)!*(n*m(t) - lymda))*(lymda/m(t))^n
Pw(t) = 0.00124682
P(t) := 1 - Pw(t)*e^(-(n*m(t) - lymda)*t)
P(t) = 1
Gn(t) := Pw(t)/(n*m(t) - lymda)
Gn(t) = 8.55943e-6
# [plot: P(var_t) vs var_t]
